N := 16000
L := 32
jmax := log(N)/log(2) = 13.9658
n0 := jmax*log(2)/log(L) = 2.79316
n := 3
Hxmax := jmax/n0 = 5
nu := 544/71 = 7.66197
Hxr := jmax/nu = 1.82274
Hor := jmax/n = 4.65526
R := 1 - Hxr/Hxmax = 0.635452
Vch := 544*Hxr/38 = 26.094
Vcht := 544*Hxr/208 = 4.76717
Vch/Vcht = 5.47368
# Избыточность текста из 100 букв  63 лишних
